*Heading
** Job name: Analysis Model name: Model-1
** Generated by: Abaqus/CAE 6.14-2
*Preprint, echo=NO, model=NO, history=NO, contact=NO
**
** PARTS
**
*Part, name=wing_structure
*Node
      1,  0.800000012, 0.00788810197,           0.
      2,  0.800000012, 0.00788810197, 0.00200000009
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*Element, type=S4R
1,   1,   2, 399, 406
2, 406, 399, 400, 405
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*Nset, nset=Set-OML
    3,    4,    7,    8,    9,   10
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*Elset, elset=Set-OML
   13,   14,   15,   16,   17,   18
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*Nset, nset=Set-All, generate
    1,  6554,     1
*Elset, elset=Set-All, generate
    1,  3461,     1
*Nset, nset=Set-Spars
   25,   26,   55,   56,  113,  114
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*Elset, elset=Set-Spars
 1029, 1030, 1031, 1032, 1033, 1034
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*Nset, nset=Set-SMA
    3,    4,    7,    8,    9,   10
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*Elset, elset=Set-SMA
  13,  14,  15,  16,  17,  18
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*Nset, nset=Set-OML-Aluminum
    3,    4,    7,    8,    9,   10
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*Elset, elset=Set-OML-Aluminum
   13,   14,   15,   16,   17,   18
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*Elset, elset=_Surf-OML_SNEG, internal
   13,   14,   15,   16,   17,   18
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*Surface, type=ELEMENT, name=Surf-OML
_Surf-OML_SNEG, SNEG
** Section: Section-ABS
*Shell Section, elset=Set-All, material=ABS
0.001, 5
*End Part
**
**
** ASSEMBLY
**
*Assembly, name=Assembly
**
*Instance, name=wing_structure-1, part=wing_structure
*End Instance
**
*Nset, nset=Set-OML, instance=wing_structure-1
    3,    4,    7,    8,    9,   10
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*Elset, elset=Set-OML, instance=wing_structure-1
   13,   14,   15,   16,   17,   18
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*Nset, nset=TIPNODE, instance=wing_structure-1
 63,
*End Assembly
**
** MATERIALS
**
*Material, name=ABS
*Density
1070.,
*Elastic
 2.32e+09, 0.3
** ----------------------------------------------------------------
**
** STEP: Aerodynamic loading
**
*Step, name="Aerodynamic loading", nlgeom=NO
*Static
1., 1., 1e-05, 1.
**
** BOUNDARY CONDITIONS
**
** Name: BC-Encastre Type: Symmetry/Antisymmetry/Encastre
*Boundary
wing_structure-1.Set-Spars, ENCASTRE
**
** LOADS
**
** Name: Pressure   Type: Pressure Using Field: Distribution
*Dload
wing_structure-1.13, P, 143.952
wing_structure-1.14, P, 143.881
wing_structure-1.15, P, 143.811
wing_structure-1.16, P, 143.741
wing_structure-1.17, P, 143.671
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wing_structure-1.3188, P, -727.162
**
** OUTPUT REQUESTS
**
*Restart, write, frequency=0
**
** FIELD OUTPUT: F-Output-1
**
*Output, field, variable=PRESELECT
**
** HISTORY OUTPUT: H-Output-1
**
*Output, history, variable=PRESELECT
*End Step
